# Spindle Calculations
pi := 3.14159
# Assumptions:
# - Fixed Bearings
# - Perfect Turning about Z
# Applied Forces
F_cut_x := 1 N
F_cut_y := 1 N
F_feed_z := 1 N
F_belt := 1 N
D_part := 5 cm
L_part := 10 cm  # L_part is the length of the part from the end of the chuck
# Part Dimensions (The thing getting cut)
# Spindle Shaft Dimensions
R_spindle_ab := 1 cm
L_ef := 1 cm
L_de := 1 cm
L_cd := 1 cm
L_bc := 1 cm
L_ab := 1 cm
R_spindle_fg := 1 cm
R_spindle_be := 1 cm
D_ef := 1 cm
D_de := 1 cm
D_cd := 1 cm
D_bc := 1 cm
D_ab := 1 cm
R_spindle_ef := 1 cm
# Material Properties - 12L14
E := 200 GPa
E_part := 70 GPa
G := 2 GPa
G_part := 2 GPa
# Force Balance Calculations
Ifp := pi*D_part^4/64
Jfp := pi*D_part^4/32
Afp := pi*D_part^2/2
Rz_fp := [
    1, -(F_cut_y*D_part/2*L_part/(Jfp*G_part)), 0, 0;
    F_cut_y*D_part/2*L_part/(Jfp*G_part), 1, 0, 0;
    0, 0, 1, 0;
    0, 0, 0, 1
]
Rx_fp := [
    1, 0, 0, 0;
    0, 1, -(F_cut_y*L_part/(2*E_part*Ifp)), 0;
    0, F_cut_y*L_part/(2*E_part*Ifp), 1, 0;
    0, 0, 0, 1
]
Ry_fp := [
    1, 0, F_cut_x*L_part/(2*E_part*Ifp), 0;
    0, 1, 0, 0;
    -(F_cut_x*L_part/(2*E_part*Ifp)), 0, 1, 0;
    0, 0, 0, 1
]
Tz_fp := [1, 0, 0, 0; 0, 1, 0, 0; 0, 0, 1, -F_feed_z*L_part/(E_part*Afp); 0, 0, 0, 1]
Ty_fp := [1, 0, 0, 0; 0, 1, 0, F_cut_y*L_part^3/(3*E_part*Ifp); 0, 0, 1, 0; 0, 0, 0, 1]
Tx_fp := [1, 0, 0, F_cut_x*L_part^3/(3*E_part*Ifp); 0, 1, 0, 0; 0, 0, 1, 0; 0, 0, 0, 1]
Tn_fp := [1, 0, 0, 0; 0, 1, 0, 0; 0, 0, 1, L_part; 0, 0, 0, 1]
Tfp := Tn_fp*Tx_fp*Ty_fp*Tz_fp  # error: The matrix element units are not compatible with this operation.
Rfp := Rx_fp*Ry_fp*Rz_fp  # error: The matrix element units are not compatible with this operation.
Hfp := Tfp*Rfp
# Segment EF
Ief := pi*D_ef^4/64
Jef := pi*D_ef^4/32
Aef := pi*D_ef^2/2
Fx_ef := F_cut_x
Fz_ef := F_feed_z
Fy_ef := F_cut_y
Mz_ef := F_cut_y*D_part/2
My_ef := F_cut_x*L_part
Mx_ef := F_cut_y*L_part
Tz_ef := [1, 0, 0, 0; 0, 1, 0, 0; 0, 0, 1, F_feed_z*L_ef/(Aef*E); 0, 0, 0, 1]
Ty_ef := [1, 0, 0, 0; 0, 1, 0, Mx_ef*L_ef^2/(2*E*Ief) + Fy_ef*L_ef^3/(3*E*Ief); 0, 0, 1, 0; 0, 0, 0, 1]
Tx_ef := [1, 0, 0, My_ef*L_ef^2/(2*E*Ief) + Fx_ef*L_ef^3/(3*E*Ief); 0, 1, 0, 0; 0, 0, 1, 0; 0, 0, 0, 1]
Tn_ef := [1, 0, 0, 0; 0, 1, 0, 0; 0, 0, 1, L_ef; 0, 0, 0, 1]
Rz_ef := [1, -(Mz_ef*L_ef/(Jef*G)), 0, 0; Mz_ef*L_ef/(Jef*G), 1, 0, 0; 0, 0, 1, 0; 0, 0, 0, 1]
Rx_ef := [
    1, 0, 0, 0;
    0, 1, -(My_ef*L_ef/(E*Ief) + Fx_ef*L_ef^2/(2*E*Ief)), 0;
    0, My_ef*L_ef/(E*Ief) + Fx_ef*L_ef^2/(2*E*Ief), 1, 0;
    0, 0, 0, 1
]
Ry_ef := [
    1, 0, Mx_ef*L_ef/(E*Ief) + Fy_ef*L_ef^2/(2*E*Ief), 0;
    0, 1, 0, 0;
    -(Mx_ef*L_ef/(E*Ief) + Fy_ef*L_ef^2/(2*E*Ief)), 0, 1, 0;
    0, 0, 0, 1
]
Tef := Tn_ef*Tx_ef*Ty_ef*Tz_ef  # error: The matrix element units are not compatible with this operation.
Ref := Rx_ef*Ry_ef*Rz_ef
Hef := Tef*Ref
# Segment DE
Ide := pi*D_de^4/64
Jde := pi*D_de^4/32
Ade := pi*D_de^2/2
Fx_de := F_cut_x
Fz_de := F_feed_z
Fy_de := F_cut_y
Mz_de := F_cut_y*D_part/2
My_de := F_cut_x*(L_part + L_ef)
Mx_de := F_cut_y*(L_part + L_ef)
Tz_de := [1, 0, 0, 0; 0, 1, 0, 0; 0, 0, 1, Fz_de*L_de/(Ade*E); 0, 0, 0, 1]
Ty_de := [
    1, 0, 0, 0;
    0, 1, 0, Mx_de*L_de^2/(2*E*Ide) + Fy_de*L_de^3/(3*E*Ide) + 5*Rb_y(L_de/2)^3/(2*3*E*Ide);
    0, 0, 1, 0;
    0, 0, 0, 1
]
Tx_de := [
    1, 0, 0, My_de*L_de^2/(2*E*Ide) + Fx_de*L_de^3/(3*E*Ide) + 5*Rb_x(L_de/2)^3/(2*3*E*Ide);
    0, 1, 0, 0;
    0, 0, 1, 0;
    0, 0, 0, 1
]
Tn_de := [1, 0, 0, 0; 0, 1, 0, 0; 0, 0, 1, L_de; 0, 0, 0, 1]
Rz_de := [1, -(Mz_de*L_de/(Jde*G)), 0, 0; Mz_de*L_de/(Jde*G), 1, 0, 0; 0, 0, 1, 0; 0, 0, 0, 1]
Rx_de := [
    1, 0, 0, 0;
    0, 1, -(My_de*L_de/(E*Ide) + Fx_de*L_de^2/(2*E*Ide) + Rb_x*(Lde/2)^2/(2*E*Ide)), 0;
    0, My_de*L_de/(E*Ide) + Fx_de*L_de^2/(2*E*Ide) + Rb_x*(Lde/2)^2/(2*E*Ide), 1, 0;
    0, 0, 0, 1
]
Ry_de := [
    1, 0, Mx_de*L_de/(E*Ide) + Fy_de*L_de^2/(2*E*Ide) + Rb_y*(Lde/2)^2/(2*E*Ide), 0;
    0, 1, 0, 0;
    -(Mx_de*L_de/(E*Ide) + Fy_de*L_de^2/(2*E*Ide) + Rb_y*(Lde/2)^2/(2*E*Ide)), 0, 1, 0;
    0, 0, 0, 1
]
Tde := Tn_de*Tx_de*Ty_de*Tz_de
Rde := Rx_de*Ry_de*Rz_de
Hde := Tde*Rde
# Segment CD
Icd := pi*D_cd^4/64
Jcd := pi*D_cd^4/32
Acd := pi*D_cd^2/2
Fx_cd := F_cut_x + Rb_x
Fz_cd := F_feed_z
Fy_cd := F_cut_y + Rb_y
Mz_cd := F_cut_y*D_part/2
My_cd := F_cut_x*(L_part + L_ef + L_de) + Rb_x*L_de/2
Mx_cd := F_cut_y*(L_part + L_ef + L_de) + Rb_y*L_de/2
Tz_cd := [1, 0, 0, 0; 0, 1, 0, 0; 0, 0, 1, Fz_cd*L_cd/(Acd*E); 0, 0, 0, 1]
Ty_cd := [1, 0, 0, 0; 0, 1, 0, Mx_cd*L_cd^2/(2*E*Icd) + Fy_cd*L_cd^3/(3*E*Icd); 0, 0, 1, 0; 0, 0, 0, 1]
Tx_cd := [1, 0, 0, My_cd*L_cd^2/(2*E*Icd) + Fx_cd*L_cd^3/(3*E*Icd); 0, 1, 0, 0; 0, 0, 1, 0; 0, 0, 0, 1]
Tn_cd := [1, 0, 0, 0; 0, 1, 0, 0; 0, 0, 1, L_cd; 0, 0, 0, 1]
Rz_cd := [1, -(Mz_cd*L_cd/(Jcd*G)), 0, 0; Mz_cd*L_cd/(Jcd*G), 1, 0, 0; 0, 0, 1, 0; 0, 0, 0, 1]
Rx_cd := [
    1, 0, 0, 0;
    0, 1, -(My_cd*L_cd/(E*Icd) + Fx_cd*L_cd^2/(2*E*Icd)), 0;
    0, My_cd*L_cd/(E*Icd) + Fx_cd*L_cd^2/(2*E*Icd), 1, 0;
    0, 0, 0, 1
]
Ry_cd := [
    1, 0, Mx_cd*L_cd/(E*Icd) + Fy_cd*L_cd^2/(2*E*Icd), 0;
    0, 1, 0, 0;
    -(Mx_cd*L_cd/(E*Icd) + Fy_cd*L_cd^2/(2*E*Icd)), 0, 1, 0;
    0, 0, 0, 1
]
Tcd := Tn_cd*Tx_cd*Ty_cd*Tz_cd
Rcd := Rx_cd*Ry_cd*Rz_cd
Hcd := Tcd*Rcd
# Segment BC
Ibc := pi*D_bc^4/64
Jbc := pi*D_bc^4/32
Abc := pi*D_bc^2/2
Fx_bc := F_cut_x + Rb_x
Fz_bc := F_feed_z
Fy_bc := F_cut_y + Rb_y
Mz_bc := F_cut_y*D_part/2
My_bc := F_cut_x*(L_part + L_ef + L_de + L_cd) + Rb_x*(L_de/2 + Lcd)
Mx_bc := F_cut_y*(L_part + L_ef + L_de + L_cd) + Rb_y*(L_de/2 + Lcd)
Tz_bc := [1, 0, 0, 0; 0, 1, 0, 0; 0, 0, 1, Fz_bc*L_bc/(Abc*E) - Ra_z(L_bc/2)/(Abc*E); 0, 0, 0, 1]
Ty_bc := [
    1, 0, 0, 0;
    0, 1, 0, Mx_bc*L_bc^2/(2*E*Ibc) + Fy_bc*L_bc^3/(3*E*Ibc) + 5*Ra_y(L_bc/2)^3/(2*3*E*Ibc);
    0, 0, 1, 0;
    0, 0, 0, 1
]
Tx_bc := [
    1, 0, 0, My_bc*L_bc^2/(2*E*Ibc) + Fx_bc*L_bc^3/(3*E*Ibc) + 5*Ra_x(L_bc/2)^3/(2*3*E*Ibc);
    0, 1, 0, 0;
    0, 0, 1, 0;
    0, 0, 0, 1
]
Tn_bc := [1, 0, 0, 0; 0, 1, 0, 0; 0, 0, 1, L_bc; 0, 0, 0, 1]
Rz_bc := [1, -(Mz_bc*L_cd/(Jcd*G)), 0, 0; Mz_bc*L_cd/(Jcd*G), 1, 0, 0; 0, 0, 1, 0; 0, 0, 0, 1]
Rx_bc := [
    1, 0, 0, 0;
    0, 1, -(My_bc*L_bc/(E*Ibc) + Fx_bc*L_bc^2/(2*E*Ibc) + Ra_x*(Lbc/2)^2/(2*E*Ibc)), 0;
    0, My_bc*L_bc/(E*Ibc) + Fx_bc*L_bc^2/(2*E*Ibc) + Ra_x*(Lbc/2)^2/(2*E*Ibc), 1, 0;
    0, 0, 0, 1
]
Ry_bc := [
    1, 0, Mx_bc*L_bc/(E*Ibc) + Fy_bc*L_bc^2/(2*E*Ibc) + Ra_y*(Lbc/2)^2/(2*E*Ibc), 0;
    0, 1, 0, 0;
    -(Mx_bc*L_bc/(E*Ibc) + Fy_bc*L_bc^2/(2*E*Ibc) + Ra_y*(Lbc/2)^2/(2*E*Ibc)), 0, 1, 0;
    0, 0, 0, 1
]
Tbc := Tn_bc*Tx_bc*Ty_bc*Tz_bc
Rbc := Rx_bc*Ry_bc*Rz_bc
Hbc := Tbc*Rbc
# Segment AB
Iab := pi*D_ab^4/64
Jab := pi*D_ab^4/32
Aab := pi*D_ab^2/2
Fx_ab := F_cut_x + Ra_x + Rb_x
Fz_ab := F_feed_z + Ra_z
Fy_ab := F_cut_y + Ra_y + Rb_y
Mz_ab := F_cut_y*D_part/2
My_ab := F_cut_x*(L_part + L_ef + L_de + L_cd) + Rb_x*(L_de/2 + Lcd + Lbc) + Ra_x*(L_bc/2)
Mx_ab := F_cut_y*(L_part + L_ef + L_de + L_cd) + Rb_y*(L_de/2 + Lcd + Lbc) + Ra_y*(L_bc/2)
Tz_ab := [1, 0, 0, 0; 0, 1, 0, 0; 0, 0, 1, Fz_ab*L_ab/(Aab*E); 0, 0, 0, 1]
Ty_ab := [
    1, 0, 0, 0;
    0, 1, 0, Mx_ab*L_ab^2/(2*E*Iab) + Fy_ab*L_ab^3/(3*E*Iab) + 5*F_t(L_bc/2)^3/(2*3*E*Iab);
    0, 0, 1, 0;
    0, 0, 0, 1
]
Tx_ab := [1, 0, 0, My_ab*L_ab^2/(2*E*Iab) + Fx_ab*L_ab^3/(3*E*Iab); 0, 1, 0, 0; 0, 0, 1, 0; 0, 0, 0, 1]
Tn_ab := [1, 0, 0, 0; 0, 1, 0, 0; 0, 0, 1, L_ab; 0, 0, 0, 1]
Rz_ab := [
    1, -(Mz_ab*L_ab/(Jab*G) - M_mot*(L_ab/2)/(Jab*G)), 0, 0;
    Mz_ab*L_ab/(Jab*G) - M_mot*(L_ab/2)/(Jab*G), 1, 0, 0;
    0, 0, 1, 0;
    0, 0, 0, 1
]
Rx_ab := [
    1, 0, 0, 0;
    0, 1, -(My_ab*L_ab/(E*Iab) + Fx_ab*L_ab^2/(2*E*Iab)), 0;
    0, My_ab*L_ab/(E*Iab) + Fx_ab*L_ab^2/(2*E*Iab), 1, 0;
    0, 0, 0, 1
]
Ry_ab := [
    1, 0, Mx_ab*L_ab/(E*Iab) + Fy_ab*L_ab^2/(2*E*Iab) + F_t*(Lab/2)^2/(2*E*Iab), 0;
    0, 1, 0, 0;
    -(Mx_ab*L_ab/(E*Iab) + Fy_ab*L_ab^2/(2*E*Iab) + F_t*(Lab/2)^2/(2*E*Iab)), 0, 1, 0;
    0, 0, 0, 1
]
Tab := Tn_ab*Tx_ab*Ty_ab*Tz_ab
Rab := Rx_ab*Ry_ab*Rz_ab
Hab := Tab*Rab
